// COMSOL Multiphysics 5.1.0.234 model "piezo3D.mph"
// Outline of the model tree

Parameters
  Force = -4[N]
  Voltage = 50[V]

Geometry
  geom1 "Geometry 1" (3D, length unit mm)
    blk1: Block | size = {3, 2.5, 5}
    fin: Finalize "Form Union"

Materials
  mat1: Common "Lead Zirconate Titanate (PZT-5H)" on all domains
    def "Basic"
      relpermittivity = diag{1704.4, 1704.4, 1433.6}
      density = 7500[kg/m^3]
    StrainCharge "Strain-charge form"
      sE = {1.65e-011[1/Pa], -4.78e-012[1/Pa], -8.45e-012[1/Pa], 0[1/Pa], 0[1/Pa], 0[1/Pa], -4.78e-012[1/Pa], 1.65e-011[1/Pa], -8.45e-012[1/Pa], 0[1/Pa], 0[1/Pa], 0[1/Pa], -8.45e-012[1/Pa], -8.45e-012[1/Pa], 2.07e-011[1/Pa], 0[1/Pa], 0[1/Pa], 0[1/Pa], 0[1/Pa], 0[1/Pa], 0[1/Pa], 4.35e-011[1/Pa], 0[1/Pa], 0[1/Pa], 0[1/Pa], 0[1/Pa], 0[1/Pa], 0[1/Pa], 4.35e-011[1/Pa], 0[1/Pa], 0[1/Pa], 0[1/Pa], 0[1/Pa], 0[1/Pa], 0[1/Pa], 4.26e-011[1/Pa]}
      dET = {0[C/N], 0[C/N], -2.74e-010[C/N], 0[C/N], 0[C/N], -2.74e-010[C/N], 0[C/N], 0[C/N], 5.93e-010[C/N], 0[C/N], 7.41e-010[C/N], 0[C/N], 7.41e-010[C/N], 0[C/N], 0[C/N], 0[C/N], 0[C/N], 0[C/N]}
      epsilonrT = diag{3130, 3130, 3400}
      eta_sE = {0, 0, 0, 0, 0, 0, 0, 0, 0, 0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}
      eta_dET = {0, 0, 0, 0, 0, 0, 0, 0, 0, 0, 0, 0, 0, 0, 0, 0, 0, 0}
      eta_epsilonT = 0
    StressCharge "Stress-charge form"
      cE = {1.27205e+011[Pa], 8.02122e+010[Pa], 8.46702e+010[Pa], 0[Pa], 0[Pa], 0[Pa], 8.02122e+010[Pa], 1.27205e+011[Pa], 8.46702e+010[Pa], 0[Pa], 0[Pa], 0[Pa], 8.46702e+010[Pa], 8.46702e+010[Pa], 1.17436e+011[Pa], 0[Pa], 0[Pa], 0[Pa], 0[Pa], 0[Pa], 0[Pa], 2.29885e+010[Pa], 0[Pa], 0[Pa], 0[Pa], 0[Pa], 0[Pa], 0[Pa], 2.29885e+010[Pa], 0[Pa], 0[Pa], 0[Pa], 0[Pa], 0[Pa], 0[Pa], 2.34742e+010[Pa]}
      eES = {0[C/m^2], 0[C/m^2], -6.62281[C/m^2], 0[C/m^2], 0[C/m^2], -6.62281[C/m^2], 0[C/m^2], 0[C/m^2], 23.2403[C/m^2], 0[C/m^2], 17.0345[C/m^2], 0[C/m^2], 17.0345[C/m^2], 0[C/m^2], 0[C/m^2], 0[C/m^2], 0[C/m^2], 0[C/m^2]}
      epsilonrS = diag{1704.4, 1704.4, 1433.6}
      eta_cE = {0, 0, 0, 0, 0, 0, 0, 0, 0, 0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}
      eta_eES = {0, 0, 0, 0, 0, 0, 0, 0, 0, 0, 0, 0, 0, 0, 0, 0, 0, 0}
      eta_epsilonS = 0

Physics
  solid: SolidMechanics on all domains
    dependent variable u = {u, v, w}
    lemm1: LinearElasticModel "Linear Elastic Material 1" (default)
    free1: Free (default)
    init1: init "Initial Values 1" (default)
    pzm1: PiezoelectricMaterialModel "Piezoelectric Material 1" on all domains
    fix1: Fixed "Fixed Constraint 1" on boundaries 3
    bndl1: BoundaryLoad (disabled) on boundaries 4 | LoadType = TotalForce; Ftot = {0, 0, -Force}; FperArea = {0, 0, -20}
  es: Electrostatics on all domains
    dependent variable V
    ccn1: ChargeConservation (default)
    zc1: ZeroCharge (default)
    init1: init "Initial Values 1" (default)
    ccnp1: ChargeConservationPiezo "Charge Conservation, Piezoelectric 1" on all domains
    gnd1: Ground on boundaries 3
    fp1: FloatingPotential (disabled) on boundaries 4
    pot1: ElectricPotential on boundaries 5 | V0 = Voltage

Multiphysics
  pze1: PiezoelectricEffect on all domains | Solid_physics = solid; Electrostatics_physics = es

Mesh
  mesh1 "Mesh 1"
    size: MeshSizeDefault | hmax = 0.5; hmin = 0.09; hcurve = 0.6; hnarrow = 0.5; hgrad = 1.5; hauto = 5
    swe1: Sweep "Swept 1" on remaining entities

Studies
  std1 "Study 1"
    param: Parametric "Parametric Sweep" | pname = Voltage; plistarr = range(-5,1,0); punit = V
    stat: Stationary

Solver configurations
  sol1 "Solution 1" (study std1)
    v1: Variables "Dependent Variables 1"
    s1: Stationary "Stationary Solver 1"
      dDef: Direct
      p1: Parametric | sweeptype = sparse; pname = Voltage; plistarr = range(-5,1,0); punit = V; pcontinuationmode = no
      fc1: FullyCoupled | linsolver = dDef; termonres = auto; reserrfact = 1000

Datasets
  dset1: Solution | solution = sol1

Tables
  mm1: Table "pg2/mms1"
    // Max/min surface
    x | y | z | Electric potential (V)
    0 | 3 | 5 | -320.552
    0 | 2.5 | 0 | 0
  mm2: Table "pg3/mms1"
    // Max/min surface
    x | y | z | Total displacement (nm)
    0 | 2 | 0 | 0
    1.5 | 0 | 5 | 0.740301

Plots
  pg1: PlotGroup3D "Stress (solid)" | data = dset1
    surf1: Surface | expr = solid.mises
      def: Deform "Deformation" | expr = {u, v, w}
  pg2: PlotGroup3D "Electric Potential (es)" | data = dset1
    mslc1: Multislice | expr = V
    mms1: MaxMinSurface | expr = V; table = mm1
  pg3: PlotGroup3D "displacement" | data = dset1
    vol1: Volume | data = dset1; expr = solid.disp; unit = nm
    mms1: MaxMinSurface | data = dset1; expr = solid.disp; unit = nm; table = mm2